q := 101971.621
C := READPRN("pr_lam_25_70")
C1 := READPRN("D:\Микаилов\1_min_N.txt")
E := 2*10^10
a := 1
h := 0.04
q := 2000000 = 2000000
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C := READPRN("pr_lam_25_150")
C1 := READPRN("D:\Микаилов\2_мин_N.txt")
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a^4/(h^4*E)*q = 39.0625
a/h = 25
50/500 = 0.1
C := READPRN("pr_lam_25_210")
C1 := READPRN("D:\Микаилов\3_min_N.txt")
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C := READPRN("pr_lam_25_280")
C1 := READPRN("D:\Микаилов\4_min_N.txt")
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C := READPRN("pr_lam_25_350")
C1 := READPRN("D:\Микаилов\5_min_N.txt")
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C := READPRN("pr_lam_25_560")
C1 := READPRN("D:\Микаилов\8_mln_N.txt")
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